OpenVSP model (file version 5), 13 components.
Geometry view with OpenVSP parameter names; values to 6 digits, angles in degrees, lengths in the model's unit.
Overall bounding box: X_Min=-0.255492 X_Len=39.1549 Y_Min=-22.357 Y_Len=44.7141 Z_Min=-8.87788 Z_Len=11.5016

Fuselage "Fuselage"
  location (X Y Z) 0 0 0, rotation 0 11.1115 0
  bounding box size 35.1432 4.3905 9.05162
  Design: Length=35.5
  cross sections:
    n  XLocPercent  YLocPercent  ZLocPercent  shape
    0  0            0            -0.0373444   point
    1  0.157158     0            -0.0171162   rounded rectangle RoundRectXSec_Radius=2 RoundedRect_Height=4.72156 RoundedRect_Width=3.70543
    2  0.269924     0            0.00766805   ellipse Ellipse_Height=6.54494 Ellipse_Width=4.3905
    3  0.404218     0            0.00767      ellipse Ellipse_Height=6.432 Ellipse_Width=4.3905
    4  0.52474      0            0.00259336   rounded rectangle RoundRectXSec_Radius=1 RoundedRect_Height=5.04268 RoundedRect_Width=3.66736
    5  0.627353     0            0            rounded rectangle RoundRectXSec_Radius=0.8 RoundedRect_Height=3.97085 RoundedRect_Width=2.78926
    6  0.760463     0            0.00155602   rounded rectangle RoundRectXSec_Radius=0.6 RoundedRect_Height=2.8142 RoundedRect_Width=1.80785
    7  0.832991     0            0.00259336   rounded rectangle RoundRectXSec_Radius=0.5 RoundedRect_Height=2.19741 RoundedRect_Width=1.29132
    8  0.898793     0            0.00259336   rounded rectangle RoundRectXSec_Radius=0.3 RoundedRect_Height=1.7236 RoundedRect_Width=0.774793
    9  1            0            0.00778008   point

Human "Pilot", child of "Fuselage"
  location (X Y Z) 9.81062 0 -1.37295, rotation 0 11.1115 0; relative location 9.8913 0 0.543478, rotation 0 0 0
  mass: Density=69.0519 Shell_Flag=0 Mass_Area=1 Mass_Prior=0
  Anthropometric: Age=30 AutoDensity=1 BMI=27.7 BMI_pct=0.5 GenderFlag=0 LenUnit=4 Mass=208.492 MassUnit=3 SitFrac=0.51 Stature=6.0621 Stature_pct=0.8839 Volume=3.01935

Wing "Rudder", child of "Fuselage"
  location (X Y Z) 28.2383 0 -5.29542, rotation 90 0 -11.1115; relative location 28.7295 0 0.245902, rotation 90 0 0
  bounding box size 7.23959 0.678171 7.39647
  totals: TotalSpan=6.78571 TotalProjectedSpan=6.78571 TotalChord=4.82937 TotalArea=32.7707 TotalAR=1.40509
  root: chord 6.77778, twist 0, NACA 4-series Camber=0 CamberLoc=0.2 ThickChord=0.1
  sections:
    n  Span     Root_Chord  Tip_Chord  Area     Sweep  Sweep_Location  Dihedral  Twist  Twist_Location  tip airfoil
    1  6.78571  6.77778     2.88095    32.7707  25     0               0         0      0.25            as above

Wing "FrontWing", child of "Fuselage"
  location (X Y Z) 9.46284 0 -3.8633, rotation 0 11.1115 0; relative location 10.03 0 -1.96721, rotation 0 0 0
  symmetric about XZ
  bounding box size 18.0912 44.6951 7.80592
  totals: TotalSpan=57.6611 TotalProjectedSpan=44.3029 TotalChord=4.83965 TotalArea=300.048 TotalAR=6.54144
  root: chord 7.27778, twist 0, NACA 4-series Camber=0.0176786 CamberLoc=0.391429 ThickChord=0.142857
  sections:
    n  Span     Root_Chord  Tip_Chord  Area     Sweep    Sweep_Location  Dihedral  Twist  Twist_Location  tip airfoil
    1  20.7824  7.27778     4.04968    117.706  5        0               3         0      0.25            NACA 4-series Camber=0 CamberLoc=0.2 ThickChord=0.1
    2  8.0482   4.04968     3.98146    32.3181  53.4731  0               80        0      0.25            as above

Wing "TailWing", child of "Fuselage"
  location (X Y Z) 32.6632 0 0.75313, rotation 0 11.1115 0; relative location 31.9057 0 7.03381, rotation 0 0 0
  symmetric about XZ
  bounding box size 13.0098 44.7141 2.64146
  totals: TotalSpan=44.3862 TotalProjectedSpan=44.3862 TotalChord=4 TotalArea=177.545 TotalAR=11.0966
  root: chord 4, twist 0, NACA 4-series Camber=0 CamberLoc=0.2 ThickChord=0.1
  sections:
    n  Span     Root_Chord  Tip_Chord  Area     Sweep  Sweep_Location  Dihedral  Twist  Twist_Location  tip airfoil
    1  8.98515  4           4          35.9406  0      0               0         0      0.25            as above
    2  13.208   4           4          52.8319  -35    0               0         0      0.25            as above

Pod "Nacelles", child of "TailWing"
  location (X Y Z) 29.0868 7 -1.89102, rotation 0 11.1115 0; relative location -2.99974 7 -3.28381, rotation 0 0 0
  symmetric about XZ
  bounding box size 9.81254 15.3333 2.55218
  Design: FineRatio=15 Length=10

Propeller "PropGeom", child of "Nacelles"
  location (X Y Z) 29.0868 7 -1.89102, rotation 0 11.1115 0; relative location 0 0 0, rotation 0 0 0
  symmetric about XZ
  bounding box size 1.7647 24.018 8.85057
  Design: Diameter=10 NumBlade=3 Beta34=20 UseBeta34Flag=1 Feather=0 Rotate=0 Precone=0 ReverseFlag=0 FoldAngle=0 PropMode=0 AF=151.538 CLi=0.538798 Chord=0.177656 Solidity=0.169649 ConstructXoC=0.5 FeatherAxisXoC=0.5 FeatherOffsetXoC=0
  cross sections:
    n  RadiusFrac  shape
    0  0.2         ellipse Ellipse_Height=0.2 Ellipse_Width=0.4
    1  0.4         NACA 16-series Chord=0.83125 IdealCl=0.7 ThickChord=0.144074
    2  1           NACA 16-series Chord=0.65 IdealCl=0.2 ThickChord=0.03
  Chord along r/R (cubic Bezier): 0.2: 0.08, 0.333333: 0.15, 0.466667: 0.2, 0.6: 0.2, 0.716667: 0.2, 0.833333: 0.2, 0.95: 0.2, 0.966667: 0.2, 0.983333: 0.2, 1: 0.13
  Twist along r/R (PCHIP): 0.2: 46.75, 0.75: 20, 1: 13
  Thick along r/R (cubic Bezier): 0.2: 0.5, 0.233333: 0.3, 0.266667: 0.225, 0.3: 0.2, 0.4: 0.125, 0.5: 0.115, 0.6: 0.1, 0.733333: 0.075, 0.866667: 0.055, 1: 0.03
  CLI along r/R (cubic Bezier): 0.2: 0, 0.266667: 0.7, 0.333333: 0.7, 0.4: 0.7, 0.466667: 0.7, 0.533333: 0.7, 0.6: 0.7, 0.733333: 0.7, 0.866667: 0.7, 1: 0.2

Wing "Pylon", child of "Nacelles"
  location (X Y Z) 32.7743 7 0.798756, rotation -90 0 11.1115; relative location 3.1 0 3.35, rotation -90 0 0
  symmetric about XZ
  bounding box size 2.76522 14.282 3.29455
  totals: TotalSpan=6 TotalProjectedSpan=6 TotalChord=1.76128 TotalArea=10.5677 TotalAR=3.40661
  root: chord 2.81805, twist 0, NACA 4-series Camber=0 CamberLoc=0.2 ThickChord=0.1
  sections:
    n  Span  Root_Chord  Tip_Chord  Area     Sweep  Sweep_Location  Dihedral  Twist  Twist_Location  tip airfoil
    1  3     2.81805     0.704512   5.28384  20.4   0               0         0      0.25            as above

Fuselage "FrontStrut", child of "Fuselage"
  location (X Y Z) 9.23439 0 -4.87095, rotation -180 78.8885 -180; relative location 10 0 -3, rotation 0 90 0
  bounding box size 0.823469 0.957107 2.99194
  Design: Length=3
  cross sections:
    n  XLocPercent  YLocPercent  ZLocPercent  shape
    0  0            0            0            circle Circle_Diameter=0.25
    1  0.5          0            0            as above
    2  1            0            0            as above

Fuselage "Front tire", child of "FrontStrut"
  location (X Y Z) 8.65623 -0.25 -7.81471, rotation 180 78.8885 -90; relative location 3 -0.25 0, rotation 0 0 90
  bounding box size 2.08407 0.5 2.08407
  Design: Length=0.5
  cross sections:
    n  XLocPercent  YLocPercent  ZLocPercent  shape
    0  0            0            0            point
    1  0.125        0            0            circle Circle_Diameter=2
    2  0.1875       0            0            as above
    3  0.25         0            0            as above
    4  0.5          0            0            as above
    5  0.75         0            0            as above
    6  1            0            0            point

Wing "Back", child of "Fuselage"
  location (X Y Z) 27.2824 0 -6.37737, rotation 0 11.1115 0; relative location 28 0 -1, rotation 0 0 0
  symmetric about XZ
  bounding box size 0.490735 4 0.106335
  totals: TotalSpan=4 TotalProjectedSpan=4 TotalChord=0.5 TotalArea=2 TotalAR=8
  root: chord 0.5, twist 0, NACA 4-series Camber=0 CamberLoc=0.2 ThickChord=0.1
  sections:
    n  Span  Root_Chord  Tip_Chord  Area  Sweep  Sweep_Location  Dihedral  Twist  Twist_Location  tip airfoil
    1  2     0.5         0.5        1     0      0               0         0      0.25            as above

Fuselage "BackStrut", child of "Back"
  location (X Y Z) 27.4786 1.91 -6.41592, rotation -180 78.8885 -180; relative location 0.2 1.91 0, rotation 0 90 0
  symmetric about XZ
  bounding box size 0.534391 4.42355 1.52006
  Design: Length=1.5
  cross sections:
    n  XLocPercent  YLocPercent  ZLocPercent  shape
    0  0            0            0            circle Circle_Diameter=0.25
    1  0.5          0            0            as above
    2  1            0            0            as above

Fuselage "BackTire", child of "BackStrut"
  location (X Y Z) 27.1818 1.74 -8.28772, rotation 180 78.8885 -90; relative location 1.89392 -0.17 0.0694593, rotation 0 0 90
  symmetric about XZ
  bounding box size 1.18033 4.28 1.18033
  Design: Length=0.3
  cross sections:
    n  XLocPercent  YLocPercent  ZLocPercent  shape
    0  0            0            0            circle Circle_Diameter=0.35
    1  0            0            0            circle Circle_Diameter=1
    2  1            0            0            as above
    3  1            0            0            circle Circle_Diameter=0.35
