OpenVSP model (file version 5), 15 components.
Geometry view with OpenVSP parameter names; values to 6 digits, angles in degrees, lengths in the model's unit.
Overall bounding box: X_Min=-8.96721 X_Len=31.786 Y_Min=-24.8259 Y_Len=49.6518 Z_Min=-6.13238 Z_Len=14.1324

Human "HumanGeom"
  location (X Y Z) -2.28261 0 0, rotation 0 0 0
  mass: Density=68.477 Shell_Flag=0 Mass_Area=1 Mass_Prior=0
  Anthropometric: Age=30 AutoDensity=1 BMI=21.7667 BMI_pct=0.082932 GenderFlag=0 LenUnit=4 Mass=130 MassUnit=3 SitFrac=0.51 Stature=5.4 Stature_pct=0.0691748 Volume=1.89845

Fuselage "FuselageGeom", child of "HumanGeom"
  location (X Y Z) -8.96721 0 0, rotation 0 0 0
  bounding box size 30 4.4 7.11967
  Design: Length=30
  cross sections:
    n  XLocPercent  YLocPercent  ZLocPercent  shape
    0  0            0            -0.0352466   point
    1  0.0695706    0            -0.0303208   ellipse Ellipse_Height=2.85015 Ellipse_Width=2.66285
    2  0.157925     0            -0.0193167   ellipse Ellipse_Height=5.318 Ellipse_Width=3.53619
    3  0.313469     0            0            ellipse Ellipse_Height=6.91788 Ellipse_Width=4.4
    4  0.71645      0            0            ellipse Ellipse_Height=4.15247 Ellipse_Width=3.19078
    5  0.844175     0            0            ellipse Ellipse_Height=3.41208 Ellipse_Width=2.7293
    6  0.92063      0            0            ellipse Ellipse_Height=2.90068 Ellipse_Width=2.34438
    7  1            0            0            point

Wing "WingGeom", child of "FuselageGeom"
  location (X Y Z) 17.2 0 0, rotation 90 0 0
  symmetric about XZ
  bounding box size 5.6188 0.400232 8
  totals: TotalSpan=16 TotalProjectedSpan=16 TotalChord=2.5 TotalArea=40 TotalAR=6.4
  root: chord 4, twist 0, NACA 4-series Camber=0 CamberLoc=0.2 ThickChord=0.1
  sections:
    n  Span  Root_Chord  Tip_Chord  Area  Sweep  Sweep_Location  Dihedral  Twist  Twist_Location  tip airfoil
    1  8     4           1          20    30     0               0         0      0.25            as above

Wing "WingGeom"
  location (X Y Z) 2.1 0 -1.4, rotation 0 0 0
  symmetric about XZ
  bounding box size 4.90787 44 1.82464
  totals: TotalSpan=44 TotalProjectedSpan=44 TotalChord=4.4 TotalArea=193.6 TotalAR=10
  root: chord 4.8, twist 0, NACA 4-series Camber=0 CamberLoc=0.2 DeltaX=-0.1 ThickChord=0.38
  sections:
    n  Span  Root_Chord  Tip_Chord  Area  Sweep  Sweep_Location  Dihedral  Twist  Twist_Location  tip airfoil
    1  22    4.8         4          96.8  0      0               0         0      0.25            NACA 4-series Camber=0 CamberLoc=0.2 ThickChord=0.1

Ellipsoid "EllipsoidGeom"
  location (X Y Z) 0.35 -5 -2.3913, rotation 0 0 0
  symmetric about XZ
  bounding box size 3.95545 11.4 1.4
  Design: A_Radius=1.97773 B_Radius=0.7 C_Radius=0.7

Ellipsoid "EllipsoidGeom", child of "EllipsoidGeom"
  location (X Y Z) -0.7 -21.8261 -1.41304, rotation 0 0 0
  symmetric about XZ
  bounding box size 9 45.8829 2.81
  Design: A_Radius=4.5 B_Radius=1.11534 C_Radius=1.405

Ellipsoid "EllipsoidGeom", child of "EllipsoidGeom"
  location (X Y Z) 0.5 -21.8043 -1.41304, rotation 0 0 0
  symmetric about XZ
  bounding box size 0.8 46.6087 3
  Design: A_Radius=0.4 B_Radius=1.5 C_Radius=1.5

Ellipsoid "EllipsoidGeom", child of "EllipsoidGeom"
  location (X Y Z) 0.35 -9 -2.3913, rotation 0 0 0
  symmetric about XZ
  bounding box size 3.95545 19.4 1.4
  Design: A_Radius=1.97773 B_Radius=0.7 C_Radius=0.7

Ellipsoid "EllipsoidGeom", child of "EllipsoidGeom"
  location (X Y Z) 0.35 -13 -2.3913, rotation 0 0 0
  symmetric about XZ
  bounding box size 3.95545 27.4 1.4
  Design: A_Radius=1.97773 B_Radius=0.7 C_Radius=0.7

Propeller "PropGeom", child of "EllipsoidGeom"
  location (X Y Z) 0.83 -5 -2.39, rotation 0 0 0
  symmetric about XZ
  bounding box size 0.186364 12.1328 3.36956
  Design: Diameter=3.75 NumBlade=3 Beta34=20 UseBeta34Flag=1 Feather=0 Rotate=0 Precone=0 ReverseFlag=0 FoldAngle=0 PropMode=0 AF=151.538 CLi=0.538798 Chord=0.177656 Solidity=0.169649 ConstructXoC=0.5 FeatherAxisXoC=0.5 FeatherOffsetXoC=0
  cross sections:
    n  RadiusFrac  shape
    0  0.2         ellipse Ellipse_Height=0.075 Ellipse_Width=0.15
    1  0.4         NACA 16-series Chord=0.311719 IdealCl=0.7 ThickChord=0.144074
    2  1           NACA 16-series Chord=0.24375 IdealCl=0.2 ThickChord=0.03
  Chord along r/R (cubic Bezier): 0.2: 0.08, 0.333333: 0.15, 0.466667: 0.2, 0.6: 0.2, 0.716667: 0.2, 0.833333: 0.2, 0.95: 0.2, 0.966667: 0.2, 0.983333: 0.2, 1: 0.13
  Twist along r/R (PCHIP): 0.2: 46.75, 0.75: 20, 1: 13
  Thick along r/R (cubic Bezier): 0.2: 0.5, 0.233333: 0.3, 0.266667: 0.225, 0.3: 0.2, 0.4: 0.125, 0.5: 0.115, 0.6: 0.1, 0.733333: 0.075, 0.866667: 0.055, 1: 0.03
  CLI along r/R (cubic Bezier): 0.2: 0, 0.266667: 0.7, 0.333333: 0.7, 0.4: 0.7, 0.466667: 0.7, 0.533333: 0.7, 0.6: 0.7, 0.733333: 0.7, 0.866667: 0.7, 1: 0.2

Propeller "PropGeom", child of "PropGeom"
  location (X Y Z) 0.833333 -9 -2.39, rotation 0 0 0
  symmetric about XZ
  bounding box size 0.186364 20.1328 3.36956
  Design: Diameter=3.75 NumBlade=3 Beta34=20 UseBeta34Flag=1 Feather=0 Rotate=0 Precone=0 ReverseFlag=0 FoldAngle=0 PropMode=0 AF=151.538 CLi=0.538798 Chord=0.177656 Solidity=0.169649 ConstructXoC=0.5 FeatherAxisXoC=0.5 FeatherOffsetXoC=0
  cross sections:
    n  RadiusFrac  shape
    0  0.2         ellipse Ellipse_Height=0.075 Ellipse_Width=0.15
    1  0.4         NACA 16-series Chord=0.311719 IdealCl=0.7 ThickChord=0.144074
    2  1           NACA 16-series Chord=0.24375 IdealCl=0.2 ThickChord=0.03
  blade curves as in "PropGeom"

Propeller "PropGeom", child of "PropGeom"
  location (X Y Z) 0.833333 -13 -2.39, rotation 0 0 0
  symmetric about XZ
  bounding box size 0.186364 28.1328 3.36956
  Design: Diameter=3.75 NumBlade=3 Beta34=20 UseBeta34Flag=1 Feather=0 Rotate=0 Precone=0 ReverseFlag=0 FoldAngle=0 PropMode=0 AF=151.538 CLi=0.538798 Chord=0.177656 Solidity=0.169649 ConstructXoC=0.5 FeatherAxisXoC=0.5 FeatherOffsetXoC=0
  cross sections:
    n  RadiusFrac  shape
    0  0.2         ellipse Ellipse_Height=0.075 Ellipse_Width=0.15
    1  0.4         NACA 16-series Chord=0.311719 IdealCl=0.7 ThickChord=0.144074
    2  1           NACA 16-series Chord=0.24375 IdealCl=0.2 ThickChord=0.03
  blade curves as in "PropGeom"

Wing "WingGeom", child of "PropGeom"
  location (X Y Z) 16.15 0 0, rotation 0 0 0
  symmetric about XZ
  bounding box size 2.12912 18 0.465974
  totals: TotalSpan=18 TotalProjectedSpan=18 TotalChord=3.19643 TotalArea=57.5357 TotalAR=5.63128
  root: chord 4.77778, twist 0, NACA 4-series Camber=0 CamberLoc=0.2 DeltaX=0.25 ThickChord=0.1
  sections:
    n  Span  Root_Chord  Tip_Chord  Area     Sweep  Sweep_Location  Dihedral  Twist  Twist_Location  tip airfoil
    1  9     4.77778     1.61508    28.7679  20     0               0         0      0.25            NACA 4-series Camber=0 CamberLoc=0.2 ThickChord=0.1

Ellipsoid "EllipsoidGeom", child of "PropGeom"
  location (X Y Z) 0.7 -5 -2.3913, rotation 0 0 0
  symmetric about XZ
  bounding box size 0.3 11.2 1.2
  Design: A_Radius=0.15 B_Radius=0.6 C_Radius=0.6

Propeller "PropGeom"
  location (X Y Z) 0.755 -21.84 -1.415, rotation 0 0 0
  symmetric about XZ
  bounding box size 0.521818 49.6518 9.43476
  Design: Diameter=10.5 NumBlade=3 Beta34=20 UseBeta34Flag=1 Feather=0 Rotate=0 Precone=0 ReverseFlag=0 FoldAngle=0 PropMode=0 AF=151.538 CLi=0.538798 Chord=0.177656 Solidity=0.169649 ConstructXoC=0.5 FeatherAxisXoC=0.5 FeatherOffsetXoC=0
  cross sections:
    n  RadiusFrac  shape
    0  0.2         ellipse Ellipse_Height=0.21 Ellipse_Width=0.42
    1  0.4         NACA 16-series Chord=0.872812 IdealCl=0.7 ThickChord=0.144074
    2  1           NACA 16-series Chord=0.6825 IdealCl=0.2 ThickChord=0.03
  blade curves as in "PropGeom"
