OpenVSP model (file version 5), 3 components.
Geometry view with OpenVSP parameter names; values to 6 digits, angles in degrees, lengths in the model's unit.
Overall bounding box: X_Min=0 X_Len=36.0287 Y_Min=-22.7547 Y_Len=45.5093 Z_Min=-3.00026 Z_Len=14.3619

Fuselage "Fuselage"
  location (X Y Z) 0 0 0, rotation 0 0 0
  bounding box size 35.5 4.3905 6.54494
  Design: Length=35.5
  cross sections:
    n  XLocPercent  YLocPercent  ZLocPercent  shape
    0  0            0            -0.0373444   point
    1  0.157158     0            -0.0171162   rounded rectangle RoundRectXSec_Radius=2 RoundedRect_Height=4.72156 RoundedRect_Width=3.70543
    2  0.269924     0            0.00766805   ellipse Ellipse_Height=6.54494 Ellipse_Width=4.3905
    3  0.404218     0            0.00767      ellipse Ellipse_Height=6.432 Ellipse_Width=4.3905
    4  0.52474      0            0.00259336   rounded rectangle RoundRectXSec_Radius=1 RoundedRect_Height=5.04268 RoundedRect_Width=3.66736
    5  0.627353     0            0            rounded rectangle RoundRectXSec_Radius=0.8 RoundedRect_Height=3.97085 RoundedRect_Width=2.78926
    6  0.760463     0            0.00155602   rounded rectangle RoundRectXSec_Radius=0.6 RoundedRect_Height=2.8142 RoundedRect_Width=1.80785
    7  0.832991     0            0.00259336   rounded rectangle RoundRectXSec_Radius=0.5 RoundedRect_Height=2.19741 RoundedRect_Width=1.29132
    8  0.898793     0            0.00259336   rounded rectangle RoundRectXSec_Radius=0.3 RoundedRect_Height=1.7236 RoundedRect_Width=0.774793
    9  1            0            0.00778008   point

Wing "Rudder", child of "Fuselage"
  location (X Y Z) 28.7295 0 0.245902, rotation 90 0 0
  bounding box size 6.77778 1.35608 8.12851
  totals: TotalSpan=8 TotalProjectedSpan=8 TotalChord=4.82937 TotalArea=38.6349 TotalAR=1.65653
  root: chord 6.77778, twist 0, NACA 4-series Camber=0 CamberLoc=0.2 ThickChord=0.2
  sections:
    n  Span  Root_Chord  Tip_Chord  Area     Sweep  Sweep_Location  Dihedral  Twist  Twist_Location  tip airfoil
    1  8     6.77778     2.88095    38.6349  25     0               0         0      0.25            NACA 4-series Camber=0 CamberLoc=0.2 ThickChord=0.1

Wing "WingGeom", child of "Fuselage"
  location (X Y Z) 10.03 0 -1.96721, rotation 0 0 0
  symmetric about XZ
  bounding box size 16.5871 45.421 10.9071
  totals: TotalSpan=60.1468 TotalProjectedSpan=44.7345 TotalChord=4.83965 TotalArea=310.029 TotalAR=6.4548
  root: chord 7.27778, twist 0, NACA 4-series Camber=0.0176786 CamberLoc=0.391429 ThickChord=0.2
  sections:
    n  Span     Root_Chord  Tip_Chord  Area     Sweep    Sweep_Location  Dihedral  Twist  Twist_Location  tip airfoil
    1  20.7824  7.27778     4.04968    117.706  5        0               3         0      0.25            NACA 4-series Camber=0 CamberLoc=0.2 ThickChord=0.2
    2  9.29105  4.04968     3.98146    37.3089  49.2588  0               80        0      0.25            NACA 4-series Camber=0 CamberLoc=0.2 ThickChord=0.175
