OpenVSP model (file version 5), 4 components.
Geometry view with OpenVSP parameter names; values to 6 digits, angles in degrees, lengths in the model's unit.
Overall bounding box: X_Min=0 X_Len=36.0287 Y_Min=-22.7547 Y_Len=45.5093 Z_Min=-3.00026 Z_Len=14.3619

Wing "WingGeom"
  location (X Y Z) 29.9385 0 8.26332, rotation 0 0 0
  symmetric about XZ
  bounding box size 12.3061 45.5093 1.00039
  totals: TotalSpan=44.7087 TotalProjectedSpan=44.7087 TotalChord=4.75 TotalArea=210.174 TotalAR=9.51052
  root: chord 5, twist 0, NACA 4-series Camber=0 CamberLoc=0.2 ThickChord=0.2
  sections:
    n  Span     Root_Chord  Tip_Chord  Area     Sweep     Sweep_Location  Dihedral  Twist  Twist_Location  tip airfoil
    1  8.98515  5           5          44.9257  0         0               0         0      0.25            as above
    2  13.3692  5           4          60.1613  -28.5714  0               0         0      0.25            as above

Fuselage "FuselageGeom", child of "WingGeom"
  location (X Y Z) 27.0287 0 7.36168, rotation 0 0 0; relative location -2.90984 0 -0.901639, rotation 0 0 0
  bounding box size 9 1.54295 2.27412
  Design: Length=9
  cross sections:
    n  XLocPercent  YLocPercent  ZLocPercent  shape
    0  0            0            0            point
    1  0.25         0            0            ellipse Ellipse_Height=1.5 Ellipse_Width=1.5
    2  0.315574     0            -0.016       ellipse Ellipse_Height=2.25 Ellipse_Width=1.5
    3  0.5          0            -0.0133197   as above
    4  0.625        0            0.00576332   ellipse Ellipse_Height=1.9 Ellipse_Width=1.5
    5  0.75         0            0.0382941    ellipse Ellipse_Height=1.3 Ellipse_Width=1.5
    6  0.875        0            0.0655738    ellipse Ellipse_Height=0.8 Ellipse_Width=1.5
    7  1            0            0.103932     point

Propeller "PropGeom", child of "FuselageGeom"
  location (X Y Z) 28.7295 0 7.36168, rotation 0 0 0; relative location 1.70082 0 0, rotation 0 0 0
  bounding box size 0 8 8
  Design: Diameter=8 NumBlade=4 Beta34=20 UseBeta34Flag=1 Feather=0 Rotate=0 Precone=0 ReverseFlag=0 FoldAngle=0 PropMode=2 AF=99.745 CLi=0.538798 Chord=0.136204 Solidity=0.173421 ConstructXoC=0.5 FeatherAxisXoC=0.5 FeatherOffsetXoC=0
  cross sections:
    n  RadiusFrac  shape
    0  0.2         ellipse Ellipse_Height=0.162963 Ellipse_Width=0.325926
    1  0.4         NACA 16-series Chord=0.578961 IdealCl=0.7 ThickChord=0.144074
    2  1           NACA 16-series Chord=0.224074 IdealCl=0.2 ThickChord=0.03
  Chord along r/R (cubic Bezier): 0.2: 0.0814815, 0.322922: 0.132407, 0.445844: 0.162963, 0.568766: 0.162963, 0.669816: 0.162963, 0.770866: 0.15787, 0.871916: 0.127315, 0.914611: 0.112037, 0.957305: 0.106944, 1: 0.0560185
  Twist along r/R (PCHIP): 0.2: 46.75, 0.75: 20, 1: 13
  Thick along r/R (cubic Bezier): 0.2: 0.5, 0.233333: 0.3, 0.266667: 0.225, 0.3: 0.2, 0.4: 0.125, 0.5: 0.115, 0.6: 0.1, 0.733333: 0.075, 0.866667: 0.055, 1: 0.03
  CLI along r/R (cubic Bezier): 0.2: 0, 0.266667: 0.7, 0.333333: 0.7, 0.4: 0.7, 0.466667: 0.7, 0.533333: 0.7, 0.6: 0.7, 0.733333: 0.7, 0.866667: 0.7, 1: 0.2

Ellipsoid "EllipsoidGeom", child of "PropGeom"
  location (X Y Z) 27.9008 0 7.36168, rotation 0 0 0; relative location -0.828729 0 0, rotation 0 0 0
  bounding box size 0.407407 8 8
  Design: A_Radius=0.203704 B_Radius=4 C_Radius=4
