OpenVSP model (file version 5), 12 components.
Geometry view with OpenVSP parameter names; values to 6 digits, angles in degrees, lengths in the model's unit.
Overall bounding box: X_Min=0 X_Len=36.7869 Y_Min=-25.7961 Y_Len=51.5922 Z_Min=-3.98137 Z_Len=15.0941

Fuselage "Fuselage"
  location (X Y Z) 0 0 0, rotation 0 0 0
  bounding box size 35.5 4.3905 6.54494
  Design: Length=35.5
  cross sections:
    n  XLocPercent  YLocPercent  ZLocPercent  shape
    0  0            0            -0.0373444   point
    1  0.157158     0            -0.0171162   rounded rectangle RoundRectXSec_Radius=2 RoundedRect_Height=4.72156 RoundedRect_Width=3.70543
    2  0.269924     0            0.00766805   ellipse Ellipse_Height=6.54494 Ellipse_Width=4.3905
    3  0.404218     0            0.00767      ellipse Ellipse_Height=6.432 Ellipse_Width=4.3905
    4  0.52474      0            0.00259336   rounded rectangle RoundRectXSec_Radius=1 RoundedRect_Height=5.04268 RoundedRect_Width=3.66736
    5  0.627353     0            0            rounded rectangle RoundRectXSec_Radius=0.8 RoundedRect_Height=3.97085 RoundedRect_Width=2.78926
    6  0.760463     0            0.00155602   rounded rectangle RoundRectXSec_Radius=0.6 RoundedRect_Height=2.8142 RoundedRect_Width=1.80785
    7  0.832991     0            0.00259336   rounded rectangle RoundRectXSec_Radius=0.5 RoundedRect_Height=2.19741 RoundedRect_Width=1.29132
    8  0.898793     0            0.00259336   rounded rectangle RoundRectXSec_Radius=0.3 RoundedRect_Height=1.7236 RoundedRect_Width=0.774793
    9  1            0            0.00778008   point

Human "Pilot", child of "Fuselage"
  location (X Y Z) 9.8913 0 0.543478, rotation 0 0 0
  mass: Density=69.0519 Shell_Flag=0 Mass_Area=1 Mass_Prior=0
  Anthropometric: Age=30 AutoDensity=1 BMI=27.7 BMI_pct=0.5 GenderFlag=0 LenUnit=4 Mass=208.492 MassUnit=3 SitFrac=0.51 Stature=6.0621 Stature_pct=0.8839 Volume=3.01935

Wing "Rudder", child of "Fuselage"
  location (X Y Z) 28.7295 0 0.245902, rotation 90 0 0
  bounding box size 6.77778 0.678171 8
  totals: TotalSpan=8 TotalProjectedSpan=8 TotalChord=4.82937 TotalArea=38.6349 TotalAR=1.65653
  root: chord 6.77778, twist 0, NACA 4-series Camber=0 CamberLoc=0.2 ThickChord=0.1
  sections:
    n  Span  Root_Chord  Tip_Chord  Area     Sweep  Sweep_Location  Dihedral  Twist  Twist_Location  tip airfoil
    1  8     6.77778     2.88095    38.6349  25     0               0         0      0.25            as above

Fuselage "Engine Nacelle", child of "Rudder"
  location (X Y Z) 27.7869 0 7.6127, rotation 0 0 0; relative location -0.942623 7.3668 0, rotation -90 0 0
  bounding box size 9 1.54295 2.27412
  Design: Length=9
  cross sections:
    n  XLocPercent  YLocPercent  ZLocPercent  shape
    0  0            0            0            point
    1  0.25         0            0            ellipse Ellipse_Height=1.5 Ellipse_Width=1.5
    2  0.315574     0            -0.016       ellipse Ellipse_Height=2.25 Ellipse_Width=1.5
    3  0.5          0            -0.0133197   as above
    4  0.625        0            0.00576332   ellipse Ellipse_Height=1.9 Ellipse_Width=1.5
    5  0.75         0            0.0382941    ellipse Ellipse_Height=1.3 Ellipse_Width=1.5
    6  0.875        0            0.0655738    ellipse Ellipse_Height=0.8 Ellipse_Width=1.5
    7  1            0            0.103932     point

Propeller "PropGeom", child of "Engine Nacelle"
  location (X Y Z) 28.9869 0 7.6127, rotation 0 0 0; relative location 1.2 0 0, rotation 0 0 0
  bounding box size 0 7 7
  Design: Diameter=7 NumBlade=3 Beta34=20 UseBeta34Flag=1 Feather=0 Rotate=0 Precone=0 ReverseFlag=0 FoldAngle=0 PropMode=2 AF=151.538 CLi=0.538798 Chord=0.177656 Solidity=0.169649 ConstructXoC=0.5 FeatherAxisXoC=0.5 FeatherOffsetXoC=0
  cross sections:
    n  RadiusFrac  shape
    0  0.2         ellipse Ellipse_Height=0.14 Ellipse_Width=0.28
    1  0.4         NACA 16-series Chord=0.581875 IdealCl=0.7 ThickChord=0.144074
    2  1           NACA 16-series Chord=0.455 IdealCl=0.2 ThickChord=0.03
  Chord along r/R (cubic Bezier): 0.2: 0.08, 0.333333: 0.15, 0.466667: 0.2, 0.6: 0.2, 0.716667: 0.2, 0.833333: 0.2, 0.95: 0.2, 0.966667: 0.2, 0.983333: 0.2, 1: 0.13
  Twist along r/R (PCHIP): 0.2: 46.75, 0.75: 20, 1: 13
  Thick along r/R (cubic Bezier): 0.2: 0.5, 0.233333: 0.3, 0.266667: 0.225, 0.3: 0.2, 0.4: 0.125, 0.5: 0.115, 0.6: 0.1, 0.733333: 0.075, 0.866667: 0.055, 1: 0.03
  CLI along r/R (cubic Bezier): 0.2: 0, 0.266667: 0.7, 0.333333: 0.7, 0.4: 0.7, 0.466667: 0.7, 0.533333: 0.7, 0.6: 0.7, 0.733333: 0.7, 0.866667: 0.7, 1: 0.2

Wing "Bottom Wing", child of "Fuselage"
  location (X Y Z) 10 0 -2.75, rotation 0 0 0
  symmetric about XZ
  bounding box size 13.9046 51.4703 6.43107
  totals: TotalSpan=60.63 TotalProjectedSpan=50.9301 TotalChord=3.25 TotalArea=207.39 TotalAR=12.5072
  root: chord 4, twist 0, NACA 4-series Camber=0.02 CamberLoc=0.2 ThickChord=0.18
  sections:
    n  Span   Root_Chord  Tip_Chord  Area    Sweep  Sweep_Location  Dihedral  Twist  Twist_Location  tip airfoil
    1  25.5   4           3          89.25   15.5   0               3         0      0.25            as above
    2  4.815  3           3          14.445  38.5   0               90        0      0.25            NACA 4-series Camber=0 CamberLoc=0.2 ThickChord=0.18

Wing "Upper Wing", child of "Fuselage"
  location (X Y Z) 31.7922 0 8.21017, rotation 0 0 0
  symmetric about XZ
  bounding box size 14.8926 51.5922 5.254
  totals: TotalSpan=60.5637 TotalProjectedSpan=50.9337 TotalChord=3.25 TotalArea=207.158 TotalAR=12.523
  root: chord 4, twist 0, NACA 4-series Camber=0.02 CamberLoc=0.2 ThickChord=0.18
  sections:
    n  Span     Root_Chord  Tip_Chord  Area    Sweep  Sweep_Location  Dihedral  Twist  Twist_Location  tip airfoil
    1  25.4669  4           3          89.134  -15.5  0               0         0      0.25            as above
    2  4.815    3           3          14.445  -38.5  0               -90       0      0.25            NACA 4-series Camber=0 CamberLoc=0.2 ThickChord=0.18

Stack "Pesticide Boom", child of "Fuselage"
  location (X Y Z) 14.2213 -0.0307377 -3.85246, rotation 0 -10 76
  symmetric about XZ
  bounding box size 5.43274 42.2069 1.17153
  cross sections:
    n  XDelta  YDelta  ZDelta  shape
    0  0       0       0       circle Circle_Diameter=0.25
    1  0       0       0       as above
    2  2       0       0       as above
    3  1       0       0       as above
    4  18.75   0       0       as above

Stack "StackGeom", child of "Pesticide Boom"
  location (X Y Z) 14.5389 7.31237 -2.50227, rotation 0 34.5082 0; relative location 7.25738 1.24546 1.27452, rotation 43.6448 9.76398 -79.9177
  symmetric about XZ
  bounding box size 1.59607 14.8247 1.1842
  cross sections:
    n  XDelta     YDelta  ZDelta  shape
    0  0          0       0       circle Circle_Diameter=0.2
    1  0          0       0       as above
    2  0.618421   0       0       as above
    3  0.0131579  0       0       as above
    4  1.16776    0       0       as above

Stack "StackGeom", child of "Pesticide Boom"
  location (X Y Z) 15.7377 12.8949 -2.15391, rotation 0 34.5082 0; relative location 12.9743 1.3918 1.40942, rotation 43.6448 9.76398 -79.9177
  symmetric about XZ
  bounding box size 1.77904 25.9897 1.30999
  cross sections:
    n  XDelta     YDelta  ZDelta  shape
    0  0          0       0       circle Circle_Diameter=0.2
    1  0          0       0       as above
    2  0.840461   0       0       as above
    3  0.0131579  0       0       as above
    4  1.16776    0       0       as above

Stack "StackGeom", child of "Pesticide Boom"
  location (X Y Z) 17.5359 20.5975 -1.76457, rotation 0 34.5082 0; relative location 20.8929 1.47141 1.4806, rotation 43.6448 9.76398 -79.9177
  symmetric about XZ
  bounding box size 1.8197 41.3951 1.33794
  cross sections:
    n  XDelta     YDelta  ZDelta  shape
    0  0          0       0       circle Circle_Diameter=0.2
    1  0          0       0       as above
    2  0.889803   0       0       as above
    3  0.0131579  0       0       as above
    4  1.16776    0       0       as above

Stack "StackGeom", child of "Pesticide Boom"
  location (X Y Z) 12.4641 0 -2.85064, rotation 0 34.5082 0; relative location -0.34673 1.51771 1.29173, rotation 43.6448 9.76398 -79.9177
  bounding box size 1.59607 0.200004 1.1842
  cross sections:
    n  XDelta     YDelta  ZDelta  shape
    0  0          0       0       circle Circle_Diameter=0.2
    1  0          0       0       as above
    2  0.618421   0       0       as above
    3  0.0131579  0       0       as above
    4  1.16776    0       0       as above
