OpenVSP model (file version 5), 79 components.
Geometry view with OpenVSP parameter names; values to 6 digits, angles in degrees, lengths in the model's unit.
Overall bounding box: X_Min=0 X_Len=36.6782 Y_Min=-22.3831 Y_Len=44.7662 Z_Min=-7.25011 Z_Len=16.6634

Ellipsoid "Shaft"
  location (X Y Z) 19.559 -0.0266 0.0792705, rotation 3.33333 0 0
  bounding box size 3.82762 0.139948 0.139948
  Design: A_Radius=1.91381 B_Radius=0.0679094 C_Radius=0.0679094

Custom "Gear 1"
  location (X Y Z) 20.954 -0.0257233 0.187966, rotation 3.33333 0 0
  bounding box size 0 0.500976 0.500976
  Design: Diameter=0.493887
  custom script Disk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

Custom "Gear 2"
  location (X Y Z) 20.753 -0.0257233 0.187966, rotation 3.33333 0 0
  bounding box size 0 0.500976 0.500976
  Design: Diameter=0.493887
  custom script Disk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

Custom "Gear 3", child of "Gear 2"
  location (X Y Z) 23.1631 -0.0257233 0.0792705, rotation 3.33333 0 0
  bounding box size 0 0.500976 0.500976
  Design: Diameter=0.493887
  custom script Disk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

Custom "Propellor Cone"
  location (X Y Z) 18.458 5.08297 3.12275, rotation -176.667 0 -180
  symmetric about XZ
  bounding box size 0.617358 10.7922 0.62622
  Design: Diameter=0.617358 Height=0.617358
  custom script Cone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

Custom "Middle Duct"
  location (X Y Z) 20.483 -0.0257233 0.187966, rotation 3.33333 0 0
  bounding box size 3.01016 1.1766 0.873878
  Design: Camber=0 CamberLoc=0.2 Chord=3.01016 Height=0.587054 InvertFlag=0 Shape=-0.136364 ThickChord=0.0909091 Width=0.89578
  custom script Duct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

Custom "Exit Nozzle", child of "Middle Duct"
  location (X Y Z) 22.244 -0.0257233 0.187966, rotation 3.33333 0 0
  bounding box size 1.76091 0.91987 0.930345
  Design: Camber=0 CamberLoc=0.2 Chord=1.76091 Height=0.617358 InvertFlag=0 Shape=0 ThickChord=0.168182 Width=0.617358
  custom script Duct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

Propeller "Propellor"
  location (X Y Z) 18.0246 5.22018 3.14948, rotation 3.33333 0 0
  symmetric about XZ
  bounding box size 0.427394 19.0581 7.71444
  Design: Diameter=8.6 NumBlade=3 Beta34=20 UseBeta34Flag=1 Feather=0 Rotate=0 Precone=0 ReverseFlag=0 FoldAngle=0 PropMode=0 AF=151.538 CLi=0.538798 Chord=0.177656 Solidity=0.169649 ConstructXoC=0.5 FeatherAxisXoC=0.5 FeatherOffsetXoC=0
  cross sections:
    n  RadiusFrac  shape
    0  0.2         ellipse Ellipse_Height=0.172 Ellipse_Width=0.344
    1  0.4         NACA 16-series Chord=0.714875 IdealCl=0.7 ThickChord=0.144074
    2  1           NACA 16-series Chord=0.559 IdealCl=0.2 ThickChord=0.03
  Chord along r/R (cubic Bezier): 0.2: 0.08, 0.333333: 0.15, 0.466667: 0.2, 0.6: 0.2, 0.716667: 0.2, 0.833333: 0.2, 0.95: 0.2, 0.966667: 0.2, 0.983333: 0.2, 1: 0.13
  Twist along r/R (PCHIP): 0.2: 46.75, 0.75: 20, 1: 13
  Thick along r/R (cubic Bezier): 0.2: 0.5, 0.233333: 0.3, 0.266667: 0.225, 0.3: 0.2, 0.4: 0.125, 0.5: 0.115, 0.6: 0.1, 0.733333: 0.075, 0.866667: 0.055, 1: 0.03
  CLI along r/R (cubic Bezier): 0.2: 0, 0.266667: 0.7, 0.333333: 0.7, 0.4: 0.7, 0.466667: 0.7, 0.533333: 0.7, 0.6: 0.7, 0.733333: 0.7, 0.866667: 0.7, 1: 0.2

Custom "Propellor Motor Disk", child of "Propellor"
  location (X Y Z) 18.0233 5.19167 3.12275, rotation 3.33333 0 0
  symmetric about XZ
  bounding box size 0 12.1185 1.73515
  Design: Diameter=1.7106
  custom script Disk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

Custom "Duct", child of "Propellor Motor Disk"
  location (X Y Z) 19.0137 -0.055 0.152177, rotation 0.435 -0.434783 0
  bounding box size 0.469282 0.743119 0.755483
  Design: Camber=0.00909091 CamberLoc=0.2 Chord=0.463594 Height=0.74083 InvertFlag=0 Shape=0 ThickChord=0.0181818 Width=0.74083
  custom script Duct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

Wing "V_stab"
  location (X Y Z) 28.9375 0 0.3, rotation 90 0 0
  bounding box size 6.68197 0.819645 8.89344
  totals: TotalSpan=8.7 TotalProjectedSpan=8.7 TotalChord=4.60674 TotalArea=40.0787 TotalAR=1.88854
  root: chord 5.1186, twist 0, NACA 4-series Camber=0 CamberLoc=0.2 ThickChord=0.16
  sections:
    n  Span  Root_Chord  Tip_Chord  Area     Sweep  Sweep_Location  Dihedral  Twist  Twist_Location  tip airfoil
    1  8.7   5.1186      4.09488    40.0787  15     0.25            0         0      0.25            NACA 4-series Camber=0 CamberLoc=0.2 ThickChord=0.1
  SS_Control "Rudder": EtaStart=0.12 EtaEnd=0.82 Length_C_Start=0.35 Length_C_End=0.35 Length_Start=1.74851 Length_End=1.4977 LE_Flag=0 Surf_Type=2

Wing "Upper Wing", child of "V_stab"
  location (X Y Z) 31.5 0 8.9, rotation 0 1.5 0; relative location 2.5625 8.6 0, rotation -90 1.5 0
  symmetric about XZ
  bounding box size 15.9972 44.7662 5.14284
  totals: TotalSpan=53.6652 TotalProjectedSpan=44 TotalChord=3.855 TotalArea=225.592 TotalAR=8.58187
  root: chord 5.18, twist 0, NACA 5-digit CamberLoc=0.15 IdealCl=0.3 ThickChord=0.18
  sections:
    n  Span     Root_Chord  Tip_Chord  Area    Sweep     Sweep_Location  Dihedral  Twist  Twist_Location  tip airfoil
    1  22       5.18        3.62       96.8    -5        0.25            0         -3     0.25            as above
    2  4.83262  3.62        3          15.996  -62.1885  0               -90       0      0.25            NACA 4-series Camber=0 CamberLoc=0.2 ThickChord=0.18
  SS_Control "Elevator": EtaStart=0.05 EtaEnd=0.231818 Length_C_Start=0.5 Length_C_End=0.5 Length_Start=2.54229 Length_End=2.36891 LE_Flag=0 Surf_Type=2
  SS_Control "Upper Flaps": EtaStart=0.287 EtaEnd=0.6232 Length_C_Start=0.3 Length_C_End=0.3 Length_Start=1.3898 Length_End=1.19792 LE_Flag=0 Surf_Type=2

Fuselage "Fuselage", child of "Upper Wing"
  location (X Y Z) 0 0 0, rotation 0 0 0
  bounding box size 35.5 4.391 6.54494
  Design: Length=35.5
  cross sections:
    n  XLocPercent  YLocPercent  ZLocPercent  shape
    0  0            0            -0.0373444   point
    1  0.157158     0            -0.0171162   rounded rectangle RoundRectXSec_Radius=2 RoundedRect_Height=4.72156 RoundedRect_Width=3.71
    2  0.269924     0            0.00766805   ellipse Ellipse_Height=6.54494 Ellipse_Width=4.39
    3  0.404218     0            0.00767      ellipse Ellipse_Height=6.432 Ellipse_Width=4.391
    4  0.52474      0            0.00259336   rounded rectangle RoundRectXSec_Radius=1 RoundedRect_Height=5.04268 RoundedRect_Width=3.67
    5  0.627353     0            0            rounded rectangle RoundRectXSec_Radius=0.8 RoundedRect_Height=3.97085 RoundedRect_Width=2.79
    6  0.92058      0            0.00259336   rounded rectangle RoundRectXSec_Radius=0.3 RoundedRect_Height=2.4 RoundedRect_Width=2
    7  1            0            0.00778008   point
  SS_Ellipse "Windshield": Center_U=0.176471 Center_W=0.754902 U_Length=0.0980392 W_Length=0.22549
  SS_Rectangle "Hopper Refuel Access Point": Center_U=0.558824 Center_W=0.960784 U_Length=0.02 W_Length=0.0294118
  SS_Rectangle "Door": Center_U=0.245098 Center_W=0.539216 U_Length=0.0637255 W_Length=0.245098
  SS_Ellipse "Window Left": Center_U=0.245098 Center_W=0.588235 Theta=12 U_Length=0.04902 W_Length=0.093137
  SS_Ellipse "Window Right": Center_U=0.245098 Center_W=0.911765 Theta=-12 U_Length=0.04902 W_Length=0.093137

Human "Pilot", child of "Fuselage"
  location (X Y Z) 7.52881 0 0.496333, rotation 0 0 0
  mass: Density=65.0084 Shell_Flag=0 Mass_Area=1 Mass_Prior=0
  Anthropometric: Age=29.9 AutoDensity=1 BMI=19.6892 BMI_pct=0.0528066 GenderFlag=1 LenUnit=4 Mass=97.6662 MassUnit=3 SitFrac=0.51 Stature=4.92126 Stature_pct=0.0528466 Volume=1.50236

Custom "Hopper Strut", child of "Pilot"
  location (X Y Z) 17.5357 0 -1.49, rotation 0 0 0
  bounding box size 0.410055 1.8 1.47359
  Design: Height=1.47359 Length=0.410055 SquareFlag=0 Width=1.8
  custom script Box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

Custom "Seat Boost", child of "Hopper Strut"
  location (X Y Z) 6.86 0 -1.5987, rotation 0 0 0
  bounding box size 1.25 1.8 1.025
  Design: Height=1.025 Length=1.25 SquareFlag=0 Width=1.8
  custom script Box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

Custom "Hopper Strut", child of "Hopper Strut"
  location (X Y Z) 11.3452 0 -1.49, rotation 0 0 0
  bounding box size 0.410055 1.8 1.474
  Design: Height=1.474 Length=0.410055 SquareFlag=0 Width=1.8
  custom script Box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

Custom "Box", child of "Fuselage"
  location (X Y Z) 7.9 0 3.04348, rotation 0 0 0
  bounding box size 0.05 0.05 0.05
  Design: Height=0.05 Length=0.05 SquareFlag=0 Width=0.05
  custom script Box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

Wing "Lower Wing", child of "Fuselage"
  location (X Y Z) 9 0 -2.5, rotation 0 1.5 0
  symmetric about XZ
  bounding box size 14.6861 44.6023 7.28502
  totals: TotalSpan=53.9223 TotalProjectedSpan=43.9999 TotalChord=3.855 TotalArea=226.707 TotalAR=8.53963
  root: chord 5.18, twist 0, NACA 5-digit CamberLoc=0.15 IdealCl=0.3 ThickChord=0.18
  sections:
    n  Span     Root_Chord  Tip_Chord  Area     Sweep  Sweep_Location  Dihedral  Twist  Twist_Location  tip airfoil
    1  22.1211  5.18        3.62       97.333   5      0.25            6         -3     0.25            as above
    2  4.84     3.62        3          16.0204  62.18  0               90        0      0.25            NACA 4-series Camber=0 CamberLoc=0.2 ThickChord=0.18
  SS_Control "Ailerons": EtaStart=0.492 EtaEnd=0.7872 Length_C_Start=0.28 Length_C_End=0.28 Length_Start=1.18807 Length_End=1.03124 LE_Flag=0 Surf_Type=2
  SS_Control "Lower Flaps": EtaStart=0.0902 EtaEnd=0.4018 Length_C_Start=0.3 Length_C_End=0.3 Length_Start=1.5024 Length_End=1.32438 LE_Flag=0 Surf_Type=2

Stack "Pesticide Horizontal Boom", child of "Lower Wing"
  location (X Y Z) 13.0505 0.0102459 -3.59054, rotation -6.00204 1.49178 -84.8432; relative location 4.07767 0.0102459 -0.984139, rotation -6 0 -85
  symmetric about XZ
  bounding box size 1.91562 34.8996 2.12651
  cross sections:
    n  XDelta  YDelta  ZDelta  shape
    0  0       0       0       point
    1  0       0       0       circle Circle_Diameter=0.25
    2  8.8     0       0       as above
    3  8.8     0       0       as above
    4  0       0       0       point

Stack "StackGeom", child of "Pesticide Horizontal Boom"
  location (X Y Z) 11.322 0.0102459 -2.66183, rotation 0 28.5615 0; relative location -0.0607549 -1.75361 0.878305, rotation -26.683 7.60723 88.2517
  bounding box size 1.8682 0.166667 1.16117
  cross sections:
    n  XDelta  YDelta  ZDelta  shape
    0  0       0       0       point
    1  0       0       0       rounded rectangle RoundRectXSec_Radius=0.005 RoundedRect_Height=0.2 RoundedRect_Width=0.1
    2  2       0       0       as above
    3  0       0       0       as above
    4  0       0       0       point

Stack "StackGeom", child of "Pesticide Horizontal Boom"
  location (X Y Z) 11.9982 -8.69514 -1.69967, rotation 0 28 0; relative location 8.72272 -1.86877 0.94251, rotation -26.1169 7.58974 88.1769
  symmetric about XZ
  bounding box size 1.93477 17.5569 1.18856
  cross sections:
    n  XDelta     YDelta  ZDelta  shape
    0  0          0       0       point
    1  0          0       0       rounded rectangle RoundRectXSec_Radius=0.005 RoundedRect_Height=0.2 RoundedRect_Width=0.1
    2  2          0       0       as above
    3  0.0570819  0       0       as above
    4  0          0       0       point

Stack "StackGeom", child of "Pesticide Horizontal Boom"
  location (X Y Z) 12.7756 -16.7831 -0.880563, rotation 0 28.5615 0; relative location 16.889 -1.82467 0.931672, rotation -26.683 7.60723 88.2517
  symmetric about XZ
  bounding box size 1.8682 33.7328 1.16117
  cross sections:
    n  XDelta  YDelta  ZDelta  shape
    0  0       0       0       point
    1  0       0       0       rounded rectangle RoundRectXSec_Radius=0.005 RoundedRect_Height=0.2 RoundedRect_Width=0.1
    2  2       0       0       as above
    3  0       0       0       as above
    4  0       0       0       point

Ellipsoid "Fire Wall", child of "Upper Wing"
  location (X Y Z) 9.32609 0 0.669348, rotation 0 0 0
  bounding box size 0.454545 4.23708 5.52
  Design: A_Radius=0.227273 B_Radius=2.11854 C_Radius=2.76

Ellipsoid "Interior Wall", child of "Fire Wall"
  location (X Y Z) 5.32609 0 -0.635, rotation 0 0 0
  bounding box size 0.2 3.6 4.59386
  Design: A_Radius=0.1 B_Radius=1.8 C_Radius=2.29693

Custom "Seat", child of "Upper Wing"
  location (X Y Z) 7.48 0 -1.08696, rotation 0 -90 0
  bounding box size 1.375 1.25 3.5
  Design: BackAngle=0 BackHeight=2.5 BackThick=0.25 SeatHeight=0.875 SeatLength=1.25 Width=1.25
  custom script Seat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

Custom "Floor", child of "Upper Wing"
  location (X Y Z) 5.35 0 -2.06522, rotation 0 0 0
  bounding box size 13.5427 2.576 0.36
  Design: Height=0.36 Length=13.5427 SquareFlag=0 Width=2.576
  custom script Box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

Custom "Dash", child of "Floor"
  location (X Y Z) 5.47348 0 0.869565, rotation 0 0 0
  bounding box size 0.35 1.23729 1.3009
  Design: Height=1.3009 Length=0.35 SquareFlag=0 Width=1.23729
  custom script Box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

Ellipsoid "Instrument Dial", child of "Dash"
  location (X Y Z) 5.79957 0.267391 0.623478, rotation 0 0 0
  bounding box size 0.1 0.4 0.4
  Design: A_Radius=0.05 B_Radius=0.2 C_Radius=0.2

Ellipsoid "Instrument Dial", child of "Instrument Dial"
  location (X Y Z) 5.79957 0.267391 1.16696, rotation 0 0 0
  bounding box size 0.1 0.4 0.4
  Design: A_Radius=0.05 B_Radius=0.2 C_Radius=0.2

Ellipsoid "Instrument Dial", child of "Instrument Dial"
  location (X Y Z) 5.79957 -0.326087 1.16696, rotation 0 0 0
  bounding box size 0.1 0.4 0.4
  Design: A_Radius=0.05 B_Radius=0.2 C_Radius=0.2

Ellipsoid "Instrument Dial", child of "Instrument Dial"
  location (X Y Z) 5.79957 -0.326087 0.623478, rotation 0 0 0
  bounding box size 0.1 0.4 0.4
  Design: A_Radius=0.05 B_Radius=0.2 C_Radius=0.2

Ellipsoid "Hopper Pipe", child of "Upper Wing"
  location (X Y Z) 18.28 1.85 0.85, rotation -90 90 0; relative location 18.28 1.85 0.85, rotation 0 90 -90
  bounding box size 0.2 1.9 0.2
  Design: A_Radius=0.95 B_Radius=0.1 C_Radius=0.1

Ellipsoid "Hopper Pipe", child of "Hopper Pipe"
  location (X Y Z) 16.5217 0 -0.37, rotation 0 0 0
  bounding box size 1.8 0.2 0.2
  Design: A_Radius=0.9 B_Radius=0.1 C_Radius=0.1

Ellipsoid "Hopper Pipe", child of "Hopper Pipe"
  location (X Y Z) 18.28 0 0.893913, rotation 0 90 0
  bounding box size 0.2 0.2 1.3
  Design: A_Radius=0.65 B_Radius=0.1 C_Radius=0.1

Fuselage "stick", child of "Upper Wing"
  location (X Y Z) 5.98361 0 -1.96721, rotation 0 -75 0
  bounding box size 0.815059 0.416628 2.49804
  Design: Length=2.5
  cross sections:
    n  Spin        XLocPercent  YLocPercent  ZLocPercent  shape
    0  -0.0857143  0            0            -0.0737705   circle Circle_Diameter=0.2
    1  0           0.25         0            0            as above
    2  0           0.5          0            0            as above
    3  0           0.75         0            0            as above
    4  0           1            0            0            rounded rectangle RoundRectXSec_Radius=0.2 RoundedRect_Height=0.2 RoundedRect_Width=0.2

Custom "Angle Reference Box", child of "Upper Wing"
  location (X Y Z) 7.34 -0.108696 2.28261, rotation 0 0 0
  bounding box size 0.05 0.05 0.05
  Design: Height=0.05 Length=0.05 SquareFlag=0 Width=0.05
  custom script Box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

Custom "Angle Reference Box", child of "Upper Wing"
  location (X Y Z) 14.3478 0 -2.945, rotation 0 0 0
  bounding box size 0.05 0.05 0.05
  Design: Height=0.05 Length=0.05 SquareFlag=0 Width=0.05
  custom script Box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

Fuselage "rudder pedals", child of "Upper Wing"
  location (X Y Z) 5.40984 -0.409836 -1.80328, rotation 0 0 0
  symmetric about XZ
  bounding box size 0.670465 1.03949 0.316923
  Design: Length=0.6
  cross sections:
    n  XLocPercent  YLocPercent  YRotate   ZLocPercent  shape
    0  0            0            0         0            circle Circle_Diameter=0.15
    1  0.25         0            0         0            as above
    2  0.5          0            0         0            as above
    3  0.75         0            0         0.0737705    as above
    4  1            0            -55.2857  0.287826     as above

Custom "rudder pedals", child of "rudder pedals"
  location (X Y Z) 5.76087 0.434783 -1.52174, rotation 0 25 0
  symmetric about XZ
  bounding box size 0.586046 1.16957 0.344202
  Design: Height=0.1 Length=0.6 SquareFlag=0 Width=0.3
  custom script Box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

Custom "Throttle", child of "Upper Wing"
  location (X Y Z) 6.56333 0.978261 0.475, rotation 0 0 0
  bounding box size 0.048004 0.15 0.03
  Design: Height=0.03 Length=0.048004 SquareFlag=0 Width=0.15
  custom script Box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

Custom "Box", child of "Throttle"
  location (X Y Z) 6.28986 0.978261 -0.79, rotation 0 0 0
  bounding box size 0.75095 0.464609 2.1872
  Design: Height=2.1872 Length=0.75095 SquareFlag=0 Width=0.464609
  custom script Box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

Custom "Box", child of "Throttle"
  location (X Y Z) 6.53333 0.978261 0.354, rotation 0 0 0
  bounding box size 0.341886 0.2 0.1
  Design: Height=0.1 Length=0.341886 SquareFlag=0 Width=0.2
  custom script Box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

Custom "Box", child of "Throttle"
  location (X Y Z) 6.56333 0.978261 0.42, rotation 0 0 0
  bounding box size 0.048004 0.05 0.08
  Design: Height=0.08 Length=0.048004 SquareFlag=0 Width=0.05
  custom script Box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

Fuselage "HopperGeom"
  location (X Y Z) 11.8 0 0.327869, rotation 0 0 0
  bounding box size 6.042 2.5 4.5
  Design: Length=5.7
  cross sections:
    n  XLocPercent  YLocPercent  ZLocPercent  shape
    0  0            0            0            point
    1  0.1          0            0            rounded rectangle RoundRectXSec_Radius=0.2 RoundedRect_Height=4.5 RoundedRect_Width=2.5
    2  0.5          0            0            as above
    3  0.895        0            0            as above
    4  1            0            0            point

Mesh "MeshGeom"
  location (X Y Z) 0 0 0, rotation 0 0 0
  triangle mesh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

Ellipsoid "generator connection", child of "MeshGeom"
  location (X Y Z) 22.4104 -0.106522 0.197826, rotation 0 0 0
  bounding box size 1.9 0.2 0.2
  Design: A_Radius=0.95 B_Radius=0.1 C_Radius=0.1

Fuselage "generator"
  location (X Y Z) 23.9344 0 0.245902, rotation 0 0 0
  bounding box size 2 1.67678 1.67678
  Design: Length=2
  cross sections:
    n  XLocPercent  YLocPercent  ZLocPercent  shape
    0  0            0            0            circle Circle_Diameter=1.5
    1  0.25         0            0            as above
    2  0.5          0            0            as above
    3  0.75         0            0            as above
    4  1            0            0            as above

Ellipsoid "Shaft", child of "generator"
  location (X Y Z) 22.4937 -0.0266 0.187966, rotation 3.33333 0 0
  bounding box size 3.82762 0.139948 0.139948
  Design: A_Radius=1.91381 B_Radius=0.0679094 C_Radius=0.0679094

Fuselage "generator"
  location (X Y Z) 23.9344 0 0.245902, rotation 0 0 0
  bounding box size 2 1.17678 1.17678
  Design: Length=2
  cross sections:
    n  XLocPercent  YLocPercent  ZLocPercent  shape
    0  0            0            0            circle Circle_Diameter=1
    1  0.25         0            0            as above
    2  0.5          0            0            as above
    3  0.75         0            0            as above
    4  1            0            0            as above

Ellipsoid "generator connection", child of "generator"
  location (X Y Z) 25.1278 0 0.197826, rotation 0 0 0
  bounding box size 1.9 0.2 0.2
  Design: A_Radius=0.95 B_Radius=0.1 C_Radius=0.1

Ellipsoid "generator connection", child of "generator connection"
  location (X Y Z) 26.4322 -0.106522 0.197826, rotation 0 0 -90
  symmetric about XZ
  bounding box size 0.2 2.17602 0.2
  Design: A_Radius=0.490744 B_Radius=0.1 C_Radius=0.1

Custom "Duct", child of "generator connection"
  location (X Y Z) 20.9783 3.26087 1.52174, rotation 30 0 90
  symmetric about XZ
  bounding box size 0.433204 10.2435 2.54139
  Design: Camber=0 CamberLoc=0.254545 Chord=3.90793 Height=0.669179 InvertFlag=0 Shape=-0.318182 ThickChord=0 Width=0.433204
  custom script Duct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

Pod "PodGeom", child of "Duct"
  location (X Y Z) 18.1522 5.1087 3.15217, rotation 0 0 0
  symmetric about XZ
  bounding box size 6.54545 11.5265 1.30909
  Design: FineRatio=10 Length=6.54545

Ellipsoid "generator connection", child of "generator connection"
  location (X Y Z) 20.78 0.980435 0.306522, rotation 0 0 0
  symmetric about XZ
  bounding box size 6.15077 2.16087 0.2
  Design: A_Radius=3.07538 B_Radius=0.1 C_Radius=0.1

Ellipsoid "generator connection", child of "generator connection"
  location (X Y Z) 20.9974 -0.541304 0.0891304, rotation -30 0 -90
  symmetric about XZ
  bounding box size 0.2 3.78078 0.858558
  Design: A_Radius=0.762963 B_Radius=0.1 C_Radius=0.1

Custom "Floor Reference"
  location (X Y Z) 20.469 0 -7.2, rotation 0 0 0
  bounding box size 0.1 0.1 0.1
  Design: Height=0.1 Length=0.1 SquareFlag=0 Width=0.1
  custom script Box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

Custom "15° Ref", child of "Floor Reference"
  location (X Y Z) 20.469 0 0, rotation 0 0 0
  bounding box size 0.1 0.1 0.1
  Design: Height=0.1 Length=0.1 SquareFlag=0 Width=0.1
  custom script Box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

Custom "Empty CG (Most Aft)", child of "15° Ref"
  location (X Y Z) 18.54 0 0, rotation 0 0 0
  bounding box size 0.1 0.1 0.1
  Design: Height=0.1 Length=0.1 SquareFlag=0 Width=0.1
  custom script Box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

Custom "Full CG (Most Fwd)", child of "Empty CG (Most Aft)"
  location (X Y Z) 17.36 0 0, rotation 0 0 0
  bounding box size 0.1 0.1 0.1
  Design: Height=0.1 Length=0.1 SquareFlag=0 Width=0.1
  custom script Box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

Custom "Lateral Tip Over Angle", child of "Full CG (Most Fwd)"
  location (X Y Z) 15.6209 -4.78261 -7.2, rotation 0 0 0
  bounding box size 0.1 0.1 0.1
  Design: Height=0.1 Length=0.1 SquareFlag=0 Width=0.1
  custom script Box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

Custom "Lateral Tip Over Angle", child of "Lateral Tip Over Angle"
  location (X Y Z) 17.36 0 -7.2, rotation 0 0 0
  bounding box size 0.1 0.1 0.1
  Design: Height=0.1 Length=0.1 SquareFlag=0 Width=0.1
  custom script Box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

Ellipsoid "Nose Strut", child of "Lateral Tip Over Angle"
  location (X Y Z) 1.144 0 -3.80435, rotation 0 0 0
  bounding box size 0.6 0.6 4.4
  Design: A_Radius=0.3 B_Radius=0.3 C_Radius=2.2

Box "Box", child of "Nose Strut"
  location (X Y Z) 0 -6.08696 -6.79, rotation 0 0 0
  bounding box size 0.1 0.1 0.1
  Design: Height=0.1 Length=0.1 SquareFlag=1 Width=0.1
  custom script Box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

Custom "End of Fuselage Reference", child of "Floor Reference"
  location (X Y Z) 35.4 0 -7.2, rotation 0 0 0
  bounding box size 0.1 0.1 0.1
  Design: Height=0.1 Length=0.1 SquareFlag=0 Width=0.1
  custom script Box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

Custom "End of Fuselage Reference", child of "End of Fuselage Reference"
  location (X Y Z) 35.4 0 0.217391, rotation 0 0 0
  bounding box size 0.1 0.1 0.1
  Design: Height=0.1 Length=0.1 SquareFlag=0 Width=0.1
  custom script Box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

Custom "Floor Reference", child of "Floor Reference"
  location (X Y Z) 3 0 -7.2, rotation 0 0 0
  bounding box size 0.1 0.1 0.1
  Design: Height=0.1 Length=0.1 SquareFlag=0 Width=0.1
  custom script Box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

Ellipsoid "Rear Strut 1 Ellipsoid", child of "Floor Reference"
  location (X Y Z) 20.469 -3.913 -3.152, rotation -35 0 0
  bounding box size 0.5 4.87202 6.79341
  Design: A_Radius=0.25 B_Radius=0.25 C_Radius=4.05

Custom "Rear Strut 1"
  location (X Y Z) 20.469 -3.91304 -3.15217, rotation -35 0 0
  bounding box size 0.4 5.42102 7.5035
  Design: Height=8.88 Length=0.4 SquareFlag=0 Width=0.4
  custom script Box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

Custom "Rear Strut 2", child of "Rear Strut 1"
  location (X Y Z) 20.469 3.36957 -3.152, rotation 30 0 0
  bounding box size 0.4 4.44641 7.30141
  Design: Height=8.2 Length=0.4 SquareFlag=0 Width=0.4
  custom script Box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

Custom "Box", child of "Rear Strut 2"
  location (X Y Z) 20.469 0 -4.34783, rotation 0 0 0
  bounding box size 0.4 0.4 5
  Design: Height=5 Length=0.4 SquareFlag=0 Width=0.4
  custom script Box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

Ellipsoid "Rear Strut 2 Ellipsoid", child of "Rear Strut 2"
  location (X Y Z) 20.469 3.37 -3.152, rotation 30 0 0
  bounding box size 0.5 4.28899 7.15278
  Design: A_Radius=0.25 B_Radius=0.25 C_Radius=4.05

Custom "Box"
  location (X Y Z) 15.6522 -4.85217 -7.2, rotation 0 0 70
  bounding box size 3.01807 7.62015 0.1
  Design: Height=0.1 Length=8 SquareFlag=0 Width=0.3
  custom script Box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

Custom "Box", child of "Box"
  location (X Y Z) 16.087 -4.2 -7.2, rotation 55 0 79.9565
  bounding box size 1.77776 4.91261 6.95631
  Design: Height=0.1 Length=8.5 SquareFlag=0 Width=0.3
  custom script Box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

Custom "Box", child of "Box"
  location (X Y Z) 3.04348 0 -7.2, rotation 0 0 -20.4
  bounding box size 17.6317 6.79948 0.1
  Design: Height=0.1 Length=18.7 SquareFlag=0 Width=0.3
  custom script Box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

Stack "StackGeom"
  location (X Y Z) 1.39344 0 -5.90164, rotation 0 -90 0
  bounding box size 0.300047 0.300047 4.63162
  cross sections:
    n  XDelta   YDelta  ZDelta  shape
    0  0        0       0       circle Circle_Diameter=0.3
    1  0        0       0       as above
    2  4.63158  0       0       as above
    3  0        0       0       as above
    4  0        0       0       as above

BodyOfRevolution "BORGeom", child of "StackGeom"
  location (X Y Z) 1.41304 -0.543478 -5.97826, rotation 0 0 90
  bounding box size 1.416 1 1.416
  Design: A0=0.135918 Ae=0.135918 Amin=0.267865 AminW=0.25 Angle=0 Diameter=0.416 Mode=0
  profile: circle Circle_Diameter=1

BodyOfRevolution "BORGeom", child of "BORGeom"
  location (X Y Z) 20.8261 3.58696 -6.08696, rotation 0 0 90
  symmetric about XZ
  bounding box size 1.83333 9.17391 1.83333
  Design: A0=0.545415 Ae=0.545415 Amin=0.0218166 AminW=0.25 Angle=0 Diameter=0.833333 Mode=0
  profile: circle Circle_Diameter=1

Stack "StackGeom", child of "StackGeom"
  location (X Y Z) 20.7869 4.34426 -6.22951, rotation 30 -90 0
  symmetric about XZ
  bounding box size 0.335355 8.96127 5.76126
  cross sections:
    n  XDelta   YDelta  ZDelta  shape
    0  0        0       0       circle Circle_Diameter=0.15
    1  0        0       0       circle Circle_Diameter=0.3
    2  6.47368  0       0       as above
    3  0        0       0       as above
    4  0        0       0       as above
