OpenVSP model (file version 5), 49 components.
Geometry view with OpenVSP parameter names; values to 6 digits, angles in degrees, lengths in the model's unit.
Overall bounding box: X_Min=0 X_Len=35.5 Y_Min=-2.1955 Y_Len=4.391 Z_Min=-3.00026 Z_Len=6.54494

Fuselage "Fuselage"
  location (X Y Z) 0 0 0, rotation 0 0 0
  bounding box size 35.5 4.391 6.54494
  Design: Length=35.5
  cross sections:
    n  XLocPercent  YLocPercent  ZLocPercent  shape
    0  0            0            -0.0373444   point
    1  0.157158     0            -0.0171162   rounded rectangle RoundRectXSec_Radius=2 RoundedRect_Height=4.72156 RoundedRect_Width=3.71
    2  0.269924     0            0.00766805   ellipse Ellipse_Height=6.54494 Ellipse_Width=4.39
    3  0.404218     0            0.00767      ellipse Ellipse_Height=6.432 Ellipse_Width=4.391
    4  0.52474      0            0.00259336   rounded rectangle RoundRectXSec_Radius=1 RoundedRect_Height=5.04268 RoundedRect_Width=3.67
    5  0.627353     0            0            rounded rectangle RoundRectXSec_Radius=0.8 RoundedRect_Height=3.97085 RoundedRect_Width=2.79
    6  0.92058      0            0.00259336   rounded rectangle RoundRectXSec_Radius=0.3 RoundedRect_Height=2.4 RoundedRect_Width=2
    7  1            0            0.00778008   point
  SS_Ellipse "SS_ELLIP_0": Center_U=0.166667 Center_W=0.754902 U_Length=0.122549 W_Length=0.275
  SS_Rectangle "SS_RECT_1": Center_U=0.0882353 Center_W=0.220588 U_Length=0.078 W_Length=0.235294
  SS_Rectangle "SS_RECT_2": Center_U=0.558824 Center_W=0.960784 U_Length=0.02 W_Length=0.0294118
  SS_Rectangle "SS_RECT_3": Center_U=0.318627 Center_W=0.539216 U_Length=0.0637255 W_Length=0.245098
  SS_Ellipse "SS_ELLIP_4": Center_U=0.681373 Center_W=0.465686 U_Length=0.093137 W_Length=0.127451
  SS_Ellipse "SS_ELLIP_5": Center_U=0.681373 Center_W=0.0392157 U_Length=0.0931373 W_Length=0.127451

Human "Pilot", child of "Fuselage"
  location (X Y Z) 7.52881 0 0.496333, rotation 0 0 0
  mass: Density=65.0084 Shell_Flag=0 Mass_Area=1 Mass_Prior=0
  Anthropometric: Age=29.9 AutoDensity=1 BMI=19.6892 BMI_pct=0.0528066 GenderFlag=1 LenUnit=4 Mass=97.6662 MassUnit=3 SitFrac=0.51 Stature=4.92126 Stature_pct=0.0528466 Volume=1.50236

Custom "Box", child of "Pilot"
  location (X Y Z) 16.34 0 -1.49, rotation 0 0 0
  bounding box size 0.410055 1.8 0.8
  Design: Height=0.8 Length=0.410055 SquareFlag=0 Width=1.8
  custom script Box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

Custom "Box", child of "Box"
  location (X Y Z) 6.86 0 -1.5987, rotation 0 0 0
  bounding box size 1.25 1.8 1.025
  Design: Height=1.025 Length=1.25 SquareFlag=0 Width=1.8
  custom script Box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

Custom "Box", child of "Box"
  location (X Y Z) 11.78 0 -1.49, rotation 0 0 0
  bounding box size 0.410055 1.8 0.8
  Design: Height=0.8 Length=0.410055 SquareFlag=0 Width=1.8
  custom script Box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

Custom "Box", child of "Fuselage"
  location (X Y Z) 7.9 0 3.04348, rotation 0 0 0
  bounding box size 0.05 0.05 0.05
  Design: Height=0.05 Length=0.05 SquareFlag=0 Width=0.05
  custom script Box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

Fuselage "Hopper Geom"
  location (X Y Z) 12 0 -0.37, rotation 0 0 0
  bounding box size 4.53 3 3
  Design: Length=4.53
  cross sections:
    n  XLocPercent  YLocPercent  ZLocPercent  shape
    0  0            0            0            circle Circle_Diameter=1
    1  0.25         0            0            ellipse Ellipse_Height=3 Ellipse_Width=3
    2  0.5          0            0            as above
    3  0.75         0            0            as above
    4  1            0            0            circle Circle_Diameter=1

Ellipsoid "EllipsoidGeom", child of "Hopper Geom"
  location (X Y Z) 11.6739 0 -0.37, rotation 0 0 0
  bounding box size 1.2 1.2 1.2
  Design: A_Radius=0.6 B_Radius=0.6 C_Radius=0.6

Ellipsoid "EllipsoidGeom", child of "EllipsoidGeom"
  location (X Y Z) 15.68 0 -0.37, rotation 0 0 0
  bounding box size 1.2 1.2 1.2
  Design: A_Radius=0.6 B_Radius=0.6 C_Radius=0.6

Custom "Nose Wheel Strut"
  location (X Y Z) 1.65 0 -1.3, rotation 0 0 0
  bounding box size 3.6 1.3077 1.5
  Design: Height=1.5 Length=3.6 SquareFlag=0 Width=1.3077
  custom script Box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

Fuselage "rudder pedals", child of "Nose Wheel Strut"
  location (X Y Z) 5.40984 -0.409836 -1.80328, rotation 0 0 0
  symmetric about XZ
  bounding box size 0.670465 1.03949 0.316923
  Design: Length=0.6
  cross sections:
    n  XLocPercent  YLocPercent  YRotate   ZLocPercent  shape
    0  0            0            0         0            circle Circle_Diameter=0.15
    1  0.25         0            0         0            as above
    2  0.5          0            0         0            as above
    3  0.75         0            0         0.0737705    as above
    4  1            0            -55.2857  0.287826     as above

Custom "rudder pedals", child of "rudder pedals"
  location (X Y Z) 5.76087 0.434783 -1.52174, rotation 0 25 0
  symmetric about XZ
  bounding box size 0.586046 1.16957 0.344202
  Design: Height=0.1 Length=0.6 SquareFlag=0 Width=0.3
  custom script Box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

Custom "Rear Wheel Strut 1"
  location (X Y Z) 21.6304 0.337 -0.6, rotation 0 0 0
  bounding box size 0.2 0.4 0.5
  Design: Height=0.5 Length=0.2 SquareFlag=0 Width=0.4
  custom script Box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

Ellipsoid "Wheel", child of "Rear Wheel Strut 1"
  location (X Y Z) 3.76304 0 -1.31304, rotation 0 0 0
  bounding box size 1.4 0.3 1.4
  Design: A_Radius=0.7 B_Radius=0.15 C_Radius=0.7

Custom "Throttle", child of "Wheel"
  location (X Y Z) 6.56333 0.978261 0.475, rotation 0 0 0
  bounding box size 0.048004 0.15 0.03
  Design: Height=0.03 Length=0.048004 SquareFlag=0 Width=0.15
  custom script Box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

Custom "Box", child of "Throttle"
  location (X Y Z) 6.28986 0.978261 -0.79, rotation 0 0 0
  bounding box size 0.75095 0.464609 2.1872
  Design: Height=2.1872 Length=0.75095 SquareFlag=0 Width=0.464609
  custom script Box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

Custom "Box", child of "Throttle"
  location (X Y Z) 6.53333 0.978261 0.354, rotation 0 0 0
  bounding box size 0.341886 0.2 0.1
  Design: Height=0.1 Length=0.341886 SquareFlag=0 Width=0.2
  custom script Box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

Custom "Box", child of "Throttle"
  location (X Y Z) 6.56333 0.978261 0.42, rotation 0 0 0
  bounding box size 0.048004 0.05 0.08
  Design: Height=0.08 Length=0.048004 SquareFlag=0 Width=0.05
  custom script Box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

Ellipsoid "Rear Wheel 1", child of "Wheel"
  location (X Y Z) 21.025 1.037 -0.55, rotation 0 0 0
  bounding box size 1.4 0.3 1.4
  Design: A_Radius=0.7 B_Radius=0.15 C_Radius=0.7

Ellipsoid "Rear Wheel 2", child of "Rear Wheel 1"
  location (X Y Z) 21.025 -1 -0.55, rotation 0 0 0
  bounding box size 1.4 0.3 1.4
  Design: A_Radius=0.7 B_Radius=0.15 C_Radius=0.7

Custom "Rear Wheel Strut 1", child of "Rear Wheel Strut 1"
  location (X Y Z) 3.13043 0.35 -1.313, rotation 0 0 0
  bounding box size 1.41224 0.2 0.45
  Design: Height=0.45 Length=1.41224 SquareFlag=0 Width=0.2
  custom script Box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

Ellipsoid "EllipsoidGeom", child of "Rear Wheel Strut 1"
  location (X Y Z) 1.62 0 -1.31304, rotation 0 0 0
  bounding box size 1 1 1
  Design: A_Radius=0.5 B_Radius=0.5 C_Radius=0.5

Custom "Rear Wheel Strut 1", child of "Rear Wheel Strut 1"
  location (X Y Z) 21.365 0.637 -0.6, rotation 0 0 0
  bounding box size 0.72717 0.2 0.45
  Design: Height=0.45 Length=0.72717 SquareFlag=0 Width=0.2
  custom script Box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

Custom "Rear Wheel Strut 2", child of "Rear Wheel Strut 1"
  location (X Y Z) 21.365 -0.6 -0.6, rotation 0 0 0
  bounding box size 0.72717 0.2 0.45
  Design: Height=0.45 Length=0.72717 SquareFlag=0 Width=0.2
  custom script Box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

Custom "Nose Wheel Strut", child of "Rear Wheel Strut 1"
  location (X Y Z) 1.75 0 -1.31304, rotation 0 0 0
  bounding box size 1.8 0.5 0.5
  Design: Height=0.5 Length=1.8 SquareFlag=0 Width=0.5
  custom script Box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

Custom "Rear Wheel Strut 2", child of "Rear Wheel Strut 1"
  location (X Y Z) 21.6304 -0.3 -0.6, rotation 0 0 0
  bounding box size 0.2 0.4 0.5
  Design: Height=0.5 Length=0.2 SquareFlag=0 Width=0.4
  custom script Box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

Ellipsoid "EllipsoidGeom"
  location (X Y Z) 18.4565 0 0.0171739, rotation 0 0 0
  bounding box size 0.454545 3.44727 4.8
  Design: A_Radius=0.227273 B_Radius=1.72364 C_Radius=2.4

Ellipsoid "EllipsoidGeom", child of "EllipsoidGeom"
  location (X Y Z) 5.32609 0 -0.635, rotation 0 0 0
  bounding box size 0.2 3.6 4.59386
  Design: A_Radius=0.1 B_Radius=1.8 C_Radius=2.29693

Custom "Seat"
  location (X Y Z) 7.48 0 -1.08696, rotation 0 -90 0
  bounding box size 1.375 1.25 3.5
  Design: BackAngle=0 BackHeight=2.5 BackThick=0.25 SeatHeight=0.875 SeatLength=1.25 Width=1.25
  custom script Seat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

Custom "Floor"
  location (X Y Z) 5.35 0 -2.06522, rotation 0 0 0
  bounding box size 13.27 2.576 0.36
  Design: Height=0.36 Length=13.27 SquareFlag=0 Width=2.576
  custom script Box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

Custom "Dash", child of "Floor"
  location (X Y Z) 5.47348 0 0.869565, rotation 0 0 0
  bounding box size 0.35 1.23729 1.3009
  Design: Height=1.3009 Length=0.35 SquareFlag=0 Width=1.23729
  custom script Box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

Ellipsoid "EllipsoidGeom", child of "Dash"
  location (X Y Z) 5.79957 0.267391 0.623478, rotation 0 0 0
  bounding box size 0.1 0.4 0.4
  Design: A_Radius=0.05 B_Radius=0.2 C_Radius=0.2

Ellipsoid "EllipsoidGeom", child of "EllipsoidGeom"
  location (X Y Z) 5.79957 0.267391 1.16696, rotation 0 0 0
  bounding box size 0.1 0.4 0.4
  Design: A_Radius=0.05 B_Radius=0.2 C_Radius=0.2

Ellipsoid "EllipsoidGeom", child of "EllipsoidGeom"
  location (X Y Z) 5.79957 -0.326087 1.16696, rotation 0 0 0
  bounding box size 0.1 0.4 0.4
  Design: A_Radius=0.05 B_Radius=0.2 C_Radius=0.2

Ellipsoid "EllipsoidGeom", child of "EllipsoidGeom"
  location (X Y Z) 5.79957 -0.326087 0.623478, rotation 0 0 0
  bounding box size 0.1 0.4 0.4
  Design: A_Radius=0.05 B_Radius=0.2 C_Radius=0.2

Ellipsoid "Hopper Pipe"
  location (X Y Z) 18.28 1.75 0.893913, rotation -90 90 0
  bounding box size 0.2 1.8 0.2
  Design: A_Radius=0.9 B_Radius=0.1 C_Radius=0.1

Ellipsoid "EllipsoidGeom", child of "Hopper Pipe"
  location (X Y Z) 16.5217 0 -0.37, rotation 0 0 0
  bounding box size 1.8 0.2 0.2
  Design: A_Radius=0.9 B_Radius=0.1 C_Radius=0.1

Ellipsoid "EllipsoidGeom", child of "Hopper Pipe"
  location (X Y Z) 18.28 0 0.893913, rotation 0 90 0
  bounding box size 0.2 0.2 1.3
  Design: A_Radius=0.65 B_Radius=0.1 C_Radius=0.1

Custom "Box"
  location (X Y Z) 21.6304 0.812 -0.6, rotation 0 0 0
  bounding box size 0.2 0.15 0.2
  Design: Height=0.2 Length=0.2 SquareFlag=0 Width=0.15
  custom script Box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

Custom "Box", child of "Box"
  location (X Y Z) 21.6304 -0.775 -0.6, rotation 0 0 0
  bounding box size 0.2 0.15 0.2
  Design: Height=0.2 Length=0.2 SquareFlag=0 Width=0.15
  custom script Box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

Custom "Box"
  location (X Y Z) 20.75 0 -0.16, rotation 0 0 0
  bounding box size 1.8 2.55085 2.24628
  Design: Height=2.24628 Length=1.8 SquareFlag=0 Width=2.55085
  custom script Box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

Fuselage "stick"
  location (X Y Z) 5.98361 0 -1.96721, rotation 0 -75 0
  bounding box size 0.815059 0.416628 2.49804
  Design: Length=2.5
  cross sections:
    n  Spin        XLocPercent  YLocPercent  ZLocPercent  shape
    0  -0.0857143  0            0            -0.0737705   circle Circle_Diameter=0.2
    1  0           0.25         0            0            as above
    2  0           0.5          0            0            as above
    3  0           0.75         0            0            as above
    4  0           1            0            0            rounded rectangle RoundRectXSec_Radius=0.2 RoundedRect_Height=0.2 RoundedRect_Width=0.2

Custom "Box"
  location (X Y Z) 7.34 -0.108696 2.28261, rotation 0 0 0
  bounding box size 0.05 0.05 0.05
  Design: Height=0.05 Length=0.05 SquareFlag=0 Width=0.05
  custom script Box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

Custom "Box", child of "Box"
  location (X Y Z) 5.32609 0 2.283, rotation 0 0 0
  bounding box size 0.05 0.05 0.05
  Design: Height=0.05 Length=0.05 SquareFlag=0 Width=0.05
  custom script Box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

Custom "Box", child of "Box"
  location (X Y Z) 5.326 0 1.675, rotation 0 0 0
  bounding box size 0.05 0.05 0.05
  Design: Height=0.05 Length=0.05 SquareFlag=0 Width=0.05
  custom script Box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

Custom "Box"
  location (X Y Z) 8.69565 0 0, rotation 0 0 0
  bounding box size 0.05 0.05 0.05
  Design: Height=0.05 Length=0.05 SquareFlag=0 Width=0.05
  custom script Box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

Custom "Box", child of "Box"
  location (X Y Z) 14.3478 0 -2.945, rotation 0 0 0
  bounding box size 0.05 0.05 0.05
  Design: Height=0.05 Length=0.05 SquareFlag=0 Width=0.05
  custom script Box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

Custom "Box", child of "Box"
  location (X Y Z) 25 0 -2.945, rotation 0 0 0
  bounding box size 0.05 0.05 0.05
  Design: Height=0.05 Length=0.05 SquareFlag=0 Width=0.05
  custom script Box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

Custom "Box"
  location (X Y Z) 32.8261 0 -1.08696, rotation 0 0 0
  bounding box size 0.05 0.05 0.05
  Design: Height=0.05 Length=0.05 SquareFlag=0 Width=0.05
  custom script Box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
