OpenVSP model (file version 5), 12 components.
Geometry view with OpenVSP parameter names; values to 6 digits, angles in degrees, lengths in the model's unit.
Overall bounding box: X_Min=0 X_Len=39.7905 Y_Min=-29.1763 Y_Len=58.3526 Z_Min=-8.45683 Z_Len=12.68

Fuselage "FuselageGeom"
  location (X Y Z) 0 0 0, rotation 0 0 0
  bounding box size 36.2036 4.79592 8.55404
  Design: Length=36
  cross sections:
    n   XLocPercent  YLocPercent  ZLocPercent  shape
    0   0            0            0            point
    1   0.22048      0            -0.0365493   rounded rectangle RoundRectXSec_Radius=0.2 RoundedRect_Height=5.2 RoundedRect_Width=4.79592
    2   0.30223      0            -0.041211    rounded rectangle RoundRectXSec_Radius=0.2 RoundedRect_Height=5.70776 RoundedRect_Width=4.79592
    3   0.453421     0            -0.0505111   rounded rectangle RoundRectXSec_Radius=0.2 RoundedRect_Height=6.62149 RoundedRect_Width=4.65545
    4   0.556648     0            -0.0392957   rounded rectangle RoundRectXSec_Radius=0.2 RoundedRect_Height=8.10399 RoundedRect_Width=4.08771
    5   0.603842     0            -0.035867    rounded rectangle RoundRectXSec_Radius=0.2 RoundedRect_Height=8.21638 RoundedRect_Width=3.40642
    6   0.740596     0            -0.0833511   rounded rectangle RoundRectXSec_Radius=0.2 RoundedRect_Height=5.20513 RoundedRect_Width=2.64117
    7   0.834971     0            -0.0916473   rounded rectangle RoundRectXSec_Radius=0.2 RoundedRect_Height=4.5053 RoundedRect_Width=2.31776
    8   0.923573     0            -0.100683    rounded rectangle RoundRectXSec_Radius=0.2 RoundedRect_Height=4.21092 RoundedRect_Width=1.72484
    9   1            0            -0.113279    rounded rectangle RoundRectXSec_Radius=0.2 RoundedRect_Height=3.31806 RoundedRect_Width=1.13193
    10  1            0            -0.125135    rounded rectangle RoundRectXSec_Radius=0.2 RoundedRect_Height=2.44428 RoundedRect_Width=0.279933
    11  1            0            -0.121999    ellipse Ellipse_Height=1.83673 Ellipse_Width=0

Wing "WingGeom"
  location (X Y Z) 11 0 -4.09836, rotation 0 0 0
  symmetric about XZ
  bounding box size 7.38189 58.3526 3.9747
  totals: TotalSpan=59.3 TotalProjectedSpan=57.8778 TotalChord=7.38189 TotalArea=437.746 TotalAR=7.65247
  root: chord 7.38189, twist 0, NACA 4-series Camber=0 CamberLoc=0.2 ThickChord=0.1
  sections:
    n  Span     Root_Chord  Tip_Chord  Area     Sweep  Sweep_Location  Dihedral  Twist  Twist_Location  tip airfoil
    1  14.825   7.38189     7.38189    109.437  0      0               3.21429   0      0.25            as above
    2  7.4125   7.38189     7.38189    54.7183  0      0               3.57143   0      0.25            as above
    3  3.70625  7.38189     7.38189    27.3591  0      0               3.57143   0      0.25            as above
    4  1.85312  7.38189     7.38189    13.6796  0      0               3.87      0      0.25            as above
    5  1.85312  7.38189     7.38189    13.6796  0      0               50        0      0.25            as above

Wing "WingGeom", child of "WingGeom"
  location (X Y Z) 31.082 0 -2.37705, rotation 0 0 0
  symmetric about XZ
  bounding box size 3.83859 20.1841 0.595335
  totals: TotalSpan=19.8 TotalProjectedSpan=19.8 TotalChord=3.83858 TotalArea=76.0039 TotalAR=5.15815
  root: chord 3.83858, twist 0, NACA 4-series Camber=0 CamberLoc=0.2 ThickChord=0.1
  sections:
    n  Span  Root_Chord  Tip_Chord  Area    Sweep  Sweep_Location  Dihedral  Twist    Twist_Location  tip airfoil
    1  4.95  3.83858     3.83858    19.001  0      0               0         7.42857  0.25            as above
    2  4.95  3.83858     3.83858    19.001  0      0               0         7.28571  0.25            as above

Wing "WingGeom", child of "WingGeom"
  location (X Y Z) 30.9016 0 -5.65574, rotation 90 0 0
  symmetric about XZ
  bounding box size 8.88889 0.889405 9.27381
  totals: TotalSpan=18.5476 TotalProjectedSpan=18.5476 TotalChord=6.125 TotalArea=113.604 TotalAR=3.02818
  root: chord 8.88889, twist 0, NACA 4-series Camber=0 CamberLoc=0.2 ThickChord=0.1
  sections:
    n  Span     Root_Chord  Tip_Chord  Area     Sweep  Sweep_Location  Dihedral  Twist  Twist_Location  tip airfoil
    1  9.27381  8.88889     3.36111    56.8021  30     0               0         0      0.25            as above

Propeller "PropGeom"
  location (X Y Z) 0.983607 0 0, rotation 0 0 0
  bounding box size 0.467151 7.38154 8.44635
  Design: Diameter=9.4 NumBlade=3 Beta34=20 UseBeta34Flag=1 Feather=0 Rotate=0 Precone=0 ReverseFlag=0 FoldAngle=0 PropMode=0 AF=151.538 CLi=0.538798 Chord=0.177656 Solidity=0.169649 ConstructXoC=0.5 FeatherAxisXoC=0.5 FeatherOffsetXoC=0
  cross sections:
    n  RadiusFrac  shape
    0  0.2         ellipse Ellipse_Height=0.188 Ellipse_Width=0.376
    1  0.4         NACA 16-series Chord=0.781375 IdealCl=0.7 ThickChord=0.144074
    2  1           NACA 16-series Chord=0.611 IdealCl=0.2 ThickChord=0.03
  Chord along r/R (cubic Bezier): 0.2: 0.08, 0.333333: 0.15, 0.466667: 0.2, 0.6: 0.2, 0.716667: 0.2, 0.833333: 0.2, 0.95: 0.2, 0.966667: 0.2, 0.983333: 0.2, 1: 0.13
  Twist along r/R (PCHIP): 0.2: 46.75, 0.75: 20, 1: 13
  Thick along r/R (cubic Bezier): 0.2: 0.5, 0.233333: 0.3, 0.266667: 0.225, 0.3: 0.2, 0.4: 0.125, 0.5: 0.115, 0.6: 0.1, 0.733333: 0.075, 0.866667: 0.055, 1: 0.03
  CLI along r/R (cubic Bezier): 0.2: 0, 0.266667: 0.7, 0.333333: 0.7, 0.4: 0.7, 0.466667: 0.7, 0.533333: 0.7, 0.6: 0.7, 0.733333: 0.7, 0.866667: 0.7, 1: 0.2

Human "HumanGeom", child of "PropGeom"
  location (X Y Z) 21 0 0, rotation 0 0 0
  mass: Density=69.3496 Shell_Flag=0 Mass_Area=1 Mass_Prior=0
  Anthropometric: Age=30 AutoDensity=1 BMI=27.7 BMI_pct=0.5 GenderFlag=0 LenUnit=4 Mass=188.306 MassUnit=3 SitFrac=0.51 Stature=5.76115 Stature_pct=0.5 Volume=2.71531

BodyOfRevolution "BORGeom"
  location (X Y Z) 10 -4.02174 -6.84783, rotation 0 0 90
  bounding box size 3 1 3
  Design: A0=3.14159 Ae=3.14159 Amin=0.785398 AminW=0.25 Angle=0 Diameter=2 Mode=0
  profile: circle Circle_Diameter=1

BodyOfRevolution "BORGeom", child of "BORGeom"
  location (X Y Z) 10 3.15239 -6.95683, rotation 0 0 90
  bounding box size 3 1 3
  Design: A0=3.14159 Ae=3.14159 Amin=0.785398 AminW=0.25 Angle=0 Diameter=2 Mode=0
  profile: circle Circle_Diameter=1

Stack "StackGeom", child of "BORGeom"
  location (X Y Z) 11 -2.13115 -4.18033, rotation -180 75 160; relative location 11 -2.13115 -4.18033, rotation 0 105 -20
  bounding box size 1.4979 1.87994 3.95694
  cross sections:
    n  XDelta   YDelta  ZDelta  shape
    0  0        0       0       point
    1  0        0       0       circle Circle_Diameter=0.5
    2  2.46053  0       0       as above
    3  1.57895  0       0       as above
    4  0        0       0       as above

Stack "StackGeom", child of "StackGeom"
  location (X Y Z) 11 2.131 -4.4259, rotation -180 75 -160; relative location 11 2.131 -4.4259, rotation 0 105 20
  bounding box size 1.4531 1.81694 3.78973
  cross sections:
    n  XDelta   YDelta  ZDelta  shape
    0  0        0       0       point
    1  0        0       0       circle Circle_Diameter=0.5
    2  2        0       0       as above
    3  1.85526  0       0       as above
    4  0        0       0       as above

BodyOfRevolution "BORGeom", child of "StackGeom"
  location (X Y Z) 33.8043 -0.434783 -7.5, rotation 0 0 90
  bounding box size 1.5 1 1.5
  Design: A0=0.19635 Ae=0.19635 Amin=0.19635 AminW=0.25 Angle=0 Diameter=0.5 Mode=0
  profile: circle Circle_Diameter=1

Stack "StackGeom", child of "BORGeom"
  location (X Y Z) 33.1148 0 -4.5082, rotation 0 75 0
  bounding box size 0.99474 0.300035 2.70859
  cross sections:
    n  XDelta   YDelta  ZDelta  shape
    0  0        0       0       circle Circle_Diameter=0.3
    1  0        0       0       as above
    2  2.72368  0       0       as above
    3  0        0       0       as above
    4  0        0       0       point
